*node, nset=nall
1, 0.596, 0, 0.09
2, 0.596, 0, 0
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*nset, nset=fix1_beam
181, 2, 47, 137, 183, 92,
*nset, nset=frontAndBack
46, 3, 4, 5, 6, 7
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*nset, nset=top
46, 91, 182, 1, 136, 184,
*nset, nset=leftAndRight
46, 3, 4, 5, 6, 7
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*nset, nset=1element_edge
46, 91, 1, 136, 2, 47, 137,
92,
*nset, nset=2element_edge
46, 91, 182, 1, 136, 184, 181,
2, 47, 137, 183, 92,
*nset, nset=surface
1, 2, 3, 4, 5, 6
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*solid section, material=steel, elset=C3D8
*element, elset=C3D8,type=C3D8
457, 2, 3, 185, 181, 47, 48, 228, 183,
458, 3, 4, 186, 185, 48, 49, 229, 228,
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
*elset, elset=frontAndBackF1
457, 458, 459, 460, 461, 462
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*elset, elset=frontAndBackF2
501, 502, 503, 504, 505, 506
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*elset, elset=topF4
500, 544,
*elset, elset=leftAndRightF3
457, 458, 459, 460, 461, 462
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*elset, elset=leftAndRightF5
544, 543, 542, 541, 540, 539
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*elset, elset=surfaceF1
457, 458, 459, 460, 461, 462
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*elset, elset=surfaceF2
501, 502, 503, 504, 505, 506
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*elset, elset=surfaceF3
457, 458, 459, 460, 461, 462
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*elset, elset=surfaceF4
500, 544,
*elset, elset=surfaceF5
544, 543, 542, 541, 540, 539
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*surface, type=element, name=sfrontAndBack
frontAndBackF1, S1
frontAndBackF2, S2
*surface, type=element, name=stop
topF4, S4
*surface, type=element, name=sleftAndRight
leftAndRightF3, S3
leftAndRightF5, S5
*surface, type=element, name=ssurface
surfaceF1, S1
surfaceF2, S2
surfaceF3, S3
surfaceF4, S4
surfaceF5, S5

*material, name=steel
*elastic
209000.0, 0.3
*density
7.85e-09
*step
*frequency
12
*nodefile
u
*elfile, output=3D
s, e
*endstep
